OpenVSP model (file version 5), 6 components.
Geometry view with OpenVSP parameter names; values to 6 digits, angles in degrees, lengths in the model's unit.
Overall bounding box: X_Min=0 X_Len=41.3576 Y_Min=-13.7843 Y_Len=27.5686 Z_Min=-2.02899 Z_Len=12.9889

Fuselage "Fuselage"
  location (X Y Z) 0 0 0, rotation 0 0 0
  bounding box size 40 7.62928 4.64588
  Design: Length=40
  cross sections:
    n   XLocPercent  YLocPercent  ZLocPercent  shape
    0   0            0            0            point
    1   0.0561598    0            0.005        general fuselage BotStr=0.83 BotTanAngle=90 CornerRad=0 Height=1.49344 LowStr=0.83 MaxWidthLoc=0 TopStr=0.83 TopTanAngle=90 UpStr=0.83 Width=1.47727
    2   0.14352      0            0.018288     general fuselage BotStr=1.13127 BotTanAngle=90 CornerRad=0 Height=2.20909 LowStr=0.83 MaxWidthLoc=-0.154545 TopStr=0.939955 TopTanAngle=90 UpStr=0.83 Width=2.60847
    3   0.303217     0            0.03         general fuselage BotStr=0.564478 BotTanAngle=11.4545 CornerRad=0 Height=2.90381 LowStr=0.83 MaxWidthLoc=-0.436364 TopStr=0.82889 TopTanAngle=34.3636 UpStr=0.83 Width=4.98608
    4   0.373946     0            0.032        general fuselage BotStr=0.661347 BotTanAngle=6.54545 CornerRad=0 Height=3.14085 LowStr=1.65532 MaxWidthLoc=-0.445455 TopStr=0.623485 TopTanAngle=17.5909 UpStr=1.83 Width=7.62928
    5   0.469994     0            0.032        general fuselage BotStr=0.747606 BotTanAngle=10.2273 CornerRad=0 Height=3.14085 LowStr=1.2971 MaxWidthLoc=-0.427273 TopStr=0.70843 TopTanAngle=13.0909 UpStr=2 Width=7.62928
    6   0.625        0            0.027        general fuselage BotStr=0.715364 BotTanAngle=9 CornerRad=0 Height=3.08316 LowStr=1.29764 MaxWidthLoc=-0.3 TopStr=0.524045 TopTanAngle=12.6818 UpStr=0.898364 Width=7.61364
    7   0.708074     0            0.027        as above
    8   0.754539     0            0.01         general fuselage BotStr=1.14791 BotTanAngle=0 CornerRad=0 Height=4.39091 LowStr=1.83 MaxWidthLoc=0.1 TopStr=0.407591 TopTanAngle=30 UpStr=0.83 Width=6
    9   0.846587     0            0.01         general fuselage BotStr=0.83 BotTanAngle=30 CornerRad=0 Height=4.39091 LowStr=0.83 MaxWidthLoc=0.1 TopStr=0.83 TopTanAngle=30 UpStr=0.83 Width=6
    10  0.938635     0            0.0158152    circle Circle_Diameter=3.7
    11  1            0            0.0158152    circle Circle_Diameter=1.9
    12  1            0            0.015        point

Wing "VerticalTail", child of "Fuselage"
  location (X Y Z) 25 0 2.58741, rotation 90 0 0
  bounding box size 16.3576 0.61853 8.37255
  totals: TotalSpan=8.37255 TotalProjectedSpan=8.37255 TotalChord=8.03105 TotalArea=56.4401 TotalAR=1.24202
  root: chord 12.3529, twist 0, NACA 4-series Camber=0 CamberLoc=0.2 ThickChord=0.05
  sections:
    n  Span     Root_Chord  Tip_Chord  Area     Sweep    Sweep_Location  Dihedral  Twist  Twist_Location  tip airfoil
    1  1.61438  12.3529     7.9085     16.3548  73       0               0         0      0.25            as above
    2  6.75817  7.9085      3.95425    40.0852  46.5054  0               0         0      0.25            as above

Wing "HorizontalTail", child of "Fuselage"
  location (X Y Z) 30.1049 0 0.63, rotation 0 0 0
  symmetric about XZ
  bounding box size 9.9115 17.3987 0.988809
  totals: TotalSpan=17.3987 TotalProjectedSpan=17.3987 TotalChord=4.71732 TotalArea=108.194 TotalAR=2.79789
  root: chord 9.88235, twist 0, NACA 4-series Camber=0 CamberLoc=0.2 ThickChord=0.1
  sections:
    n  Span     Root_Chord  Tip_Chord  Area     Sweep  Sweep_Location  Dihedral  Twist  Twist_Location  tip airfoil
    1  7.69935  9.88235     3.45098    51.329   40     0               0         0      0.25            as above
    2  1        3.45098     2.08497    2.76797  40     0               0         0      0.25            as above

Wing "Wing", child of "Fuselage"
  location (X Y Z) 15 0 0.63, rotation 0 0 0
  symmetric about XZ
  bounding box size 14.2265 27.5686 0.707203
  totals: TotalSpan=27.5686 TotalProjectedSpan=27.5686 TotalChord=8.39739 TotalArea=231.504 TotalAR=3.283
  root: chord 14.1346, twist 0, NACA 4-series Camber=0 CamberLoc=0.2 ThickChord=0.05
  sections:
    n  Span     Root_Chord  Tip_Chord  Area     Sweep  Sweep_Location  Dihedral  Twist  Twist_Location  tip airfoil
    1  13.7843  14.1346     2.66013    115.752  40     0               0         0      0.25            NACA 4-series Camber=0 CamberLoc=0.2 ThickChord=0.1

Fuselage "Inlet", child of "Fuselage"
  location (X Y Z) 13.1522 0 -1.19565, rotation 0 0 0
  bounding box size 21.1667 3.5 3.33333
  Design: Length=20
  cross sections:
    n  XLocPercent  YLocPercent  ZLocPercent  shape
    0  0            0            0            point
    1  0            0            0            general fuselage BotStr=0.399273 BotTanAngle=90 CornerRad=0 Height=1.5 LowStr=0.956591 MaxWidthLoc=0 TopStr=1.49727 TopTanAngle=90 UpStr=0.948273 Width=3.5
    2  0.358696     0            0.0333333    ellipse Ellipse_Height=3 Ellipse_Width=3.5
    3  1            0            0.05         as above
    4  1            0            0.05         point

Fuselage "Canopy", child of "Fuselage"
  location (X Y Z) 6.63043 0 1.95652, rotation 0 0 0
  bounding box size 10.171 2.25 3.39545
  Design: Length=10
  cross sections:
    n  XLocPercent  YLocPercent  ZLocPercent  shape
    0  0            0            0            point
    1  0.25         0            0            ellipse Ellipse_Height=3 Ellipse_Width=2.25
    2  1            0            0            point

VSPAERO settings: Sref=231.504 bref=27.5686 cref=8.39739 Xcg=37.8378 Ycg=0 Zcg=0.970635 AlphaStart=1 AlphaEnd=10 AlphaNpts=3 BetaStart=0 BetaEnd=0 BetaNpts=1 MachStart=0 MachEnd=0 MachNpts=1 ReCref=1e+07 Vinf=100 Rho=0.002377
