OpenVSP model (file version 5), 2 components.
Geometry view with OpenVSP parameter names; values to 6 digits, angles in degrees, lengths in the model's unit.
Overall bounding box: X_Min=0 X_Len=10 Y_Min=-2 Y_Len=4 Z_Min=-0.666667 Z_Len=1.33333

Pod "PodGeom"
  location (X Y Z) 0 0 0, rotation 0 0 0
  bounding box size 10 1.33333 1.33333
  Design: FineRatio=15 Length=10

Wing "WingGeom"
  location (X Y Z) 2.8 0 -0.3, rotation 0 0 0
  symmetric about XZ
  bounding box size 4.00036 4 0.4867
  totals: TotalSpan=4 TotalProjectedSpan=4 TotalChord=3.6 TotalArea=14.4 TotalAR=1.11111
  root: chord 4, twist 0, NACA 4-series Camber=0.02 CamberLoc=0.4 ThickChord=0.12
  sections:
    n  Span  Root_Chord  Tip_Chord  Area  Sweep  Sweep_Location  Dihedral  Twist  Twist_Location  tip airfoil
    1  2     4           3.2        7.2   5      0               0         0      0.25            NACA 4-series Camber=0 CamberLoc=0.2 ThickChord=0.1
